# Расчёт моментов
# Моменты трения в опорах:
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W_Aп := 38.27
W_Aр := 32
m_п := 2.631
m_р := 3.89
A_Xп := m_п*W_Aп = 100.688
A_Yр := m_р*W_Aр = 124.48
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Платформа
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W_Yп := W_Aр = 32
W_Zп := 49
W_Rп := sqrt(W_Yп^2 + W_Zп^2) = 58.5235
R_Xп := m_п*W_Rп = 153.975
Рама
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W_Xр := W_Aп = 38.27
W_Zр := 38.27
W_Rр := sqrt(W_Xр^2 + W_Zр^2) = 54.122
R_Yр := m_п*W_Rр = 142.395
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β_к := 20*deg = 0.349066
A_minXп := 1.58*R_Xп*tan(β_к) + 0.5*A_Xп = 138.891
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A_minYр := 1.58*R_Yр*tan(β_к) + 0.5*A_Yр = 144.127
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D := 12
M_0 := 10.8
k_1 := 0.0124
k_2 := 0.005
k_3 := 0.01
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M_тршпXп := M_0 + 500*(k_1 - k_2) + k_2*R_Xп + k_3*A_minXп = 16.6588
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m_р = 3.89
m_п = 2.631
M_тршпYр := M_0 + 500*(k_1 - k_2) + k_2*R_Yр + k_3*A_minYр = 16.6532
# Моменты тяжения токоподводов
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k_тп := 5*10^-7
β_раб := 50*deg = 0.872665
N_x := 24 + 30 + 9 + 8 = 71
l_тпX := 0.03
M_Xтп := k_тп*N_x/l_тпX*β_раб = 0.00103265
5*71/5*0.87 = 61.77
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5*79/5*0.87 = 68.73
m_п = 2.631
α_раб := 50*deg = 0.872665
N_y := 24 + 30 + 9 + 8 + 8 = 79
l_тпY := 0.03
m_р = 3.89
M_Yтп := k_тп*N_y/l_тпY*α_раб = 0.00114901
# Моменты небаланса
dx := 0.81*10^-3
dy := 1.94*10^-3
g := 9.81
dz := 26*10^-3
М_нб0 := sqrt(dx^2 + dy^2 + dz^2)*m_р*g = 0.995422
k_2 = 0.005
М_нб0 := 0.00037
n_x := 2.5
n_y := 2.5
n_z := 3
M_нбXmax := М_нб0*(n_x + n_z) = 0.002035
M_xнб := (M_0 + 500*(k_1 - k_2) + k_2*m_п*1000/2)*2*n_x = 105.388
M_нбYmax := М_нб0*(n_z + n_y) = 0.002035
M_yнб := (M_0 + 500*(k_1 - k_2) + k_3*m_р*1000)*n_y = 133.5
# Моменты от неравножёсткости
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С_xн := 2.2*10^6
C_yп := 1.2*10^6
C_zп := 3.6*10^6
C_yн := 1.6*10^8
C_zн := 3.8*10^8
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m_п = 2.631
m_р = 3.89
M_нжX := (m_п*g)^2*n_y*n_z*(1/C_yп - 1/C_zп) = 0.00277567
n_y = 2.5
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M_нжY := (m_п*g)^2*n_x*n_z*(1/C_yп - 1/C_zп) + (m_р*g)^2*n_x*n_y*(1/С_xн - 1/C_zн) = 0.00688881
# Инерционный момент рам карданова подвеса
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ω := 80 deg = 1.39626
ε := 50*deg = 0.872665
γ_0 := 5*deg = 0.0872665
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I_пX := 11.4*10^-3
I_пY := 11.2*10^-3
I_пZ := 14*10^-3
I_рX := 23.34*10^-3
I_рY := 34.16*10^-3
I_рZ := 25.89*10^-3
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M_инYуск := (I_рY + I_пZ)*ε*tan(β_раб) = 0.0500865
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M_инYкол := (I_рY + I_пZ)*γ_0*ω^2*tan(β_раб)*cos(β_раб) = 0.00627657
M_инY := M_инYуск + M_инYкол = 0.056363
# Суммарные возмущающие моменты
М_Xсумм := M_нжX + M_нбXmax + M_Xтп + M_тршпXп = 16.6646
M_Yсумм := M_инY + M_нжY + M_нбYmax + M_Yтп + M_тршпYр = 16.7197
249 + 105.39 + 43.49 + 61.77 = 459.65
80*cos(35*deg) - 80*sin(35*deg) = 19.646
234 + 133.5 + 77.59 + 68.73 + 222.53 = 736.35
80*cos(35*deg) + 80*sin(35*deg) = 111.418
50*cos(35*deg) + 50*sin(35*deg) = 69.6364
Iру
